# AguaClara Design Tool
# [reference: BasicClientInputs.xmcd]
# [reference: ExpertClientInputs.xmcd]
# [reference: DesignAssumptions.xmcd]
# [reference: MathFunctions.xmcd]
# [reference: PipeDatabase.xmcd]
# [reference: MinorLossCoefficients.xmcd]
# [reference: FluidsFunctions.xmcd]
# [reference: Sedimentation Tank.xmcd]
# [reference: Floc Hopper - New Design.xmcd]
# [reference: FCM.xmcd]
# [reference: Flocculator 3.xmcd]
# [reference: RapidMixer.xmcd]
# [reference: EntranceTankDim.xmcd]
# [reference: Materials List.xmcd]
# [reference: AutoCADMasterProgram.xmcd]
# This file must have at least one variable displayed otherwise it doesn't recalculate and it claims that all variables are undefined.
H_SedFrameWall = 0
EN_DrillSeries = 0
EN_PipeSpec = 8
L_Sed = 20.8333 m
EN_FcmTube = 0
AC_SedTank = [
    "_-view o t"; "-layer m tank"; "c t 132,132,132"; "tank"; "  "; "_-view o t _zoom w 0.16,-0.16,0 -20.99333,3.16,1.64866 _box 0,0,0 -20.83333,3,1.64866 _box 0.15,-0.15,-0.15 -20.98333,3.15,1.64866 _subtract 0.15,-0.15,-0.15  0,0,0 "; "-layer s 0"; "  "; "-layer f tank"; "  "
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]
AC_FlocTank = [
    "-layer m floctank"; "c t 91,91,91"; "floctank"; "  "; "_-view o t _zoom w 0.16,9.29,0 -20.99333,16.68882,1.83986 _box 0,9.45,0 -20.83333,16.52882,1.83986 _box 0.15,9.3,-0.15 -20.98333,16.67882,1.83986 _subtract 0.15,9.3,-0.15  0,9.45,0 "; "-layer s 0"; "  "; "-layer f floctank"; "  "; "-layer m floctankwall"
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]
HL_FlocChannels = [0.108027; 0.0831714] m
# [component: inputs AC_SedTank]
# pipe11_origin | pipe14_origin | pipe6_1ength | pipe7_length | pipe8_length | pipe13_length | pipe14_length
pipe5_1ength
# pipe12_origin | pipe13_origin | pipe1_length
